# 2000-step NVT preparation plus 10000-step NVE stability gate.
units metal
atom_style atomic
boundary p p p
atom_modify map yes sort 0 0.0
newton on
lattice diamond 5.7629999999999999
region cell block 0 2 0 2 0 2 units lattice
create_box 1 cell
create_atoms 1 box
mass 1 72.629999999999995
reset_atoms id sort yes
displace_atoms all random 0.01 0.01 0.01 77295 units box
velocity all create 969.12000000000012 85214 mom yes rot no dist gaussian
neighbor 0.3 bin
neigh_modify every 1 delay 0 check yes
pair_style hybrid/overlay pace product zbl 1.4510643826302052 1.8656542062388353
pair_coeff * * pace models/ace_127/potential.yace Ge
pair_coeff * * zbl 32 32
timestep 0.0005
thermo 100
thermo_style custom step temp pe ke etotal press
thermo_modify format float %.17g
fix thermostat all nvt temp 969.12000000000012 969.12000000000012 0.05
run 2000
unfix thermostat
reset_timestep 0
fix integrate all nve
dump trajectory all custom 100 trajectory.ace_127.lammpstrj id type x y z vx vy vz fx fy fz
dump_modify trajectory sort id
print "YE3T_NVE_BEGIN"
run 10000
print "YE3T_NVE_END"
